!!!!!!!!!!!!!!!!!!!!!!!!!!!!!!!!!!!!!
!!!!第05讲：四边简支板的屈曲荷载
!!!!算例Ex05a
!!!!!!!!!!!!!!!!!!!!!!!!!!!!!!!!!!!!!
finish
/clear
/filname,shell

/prep7
!!!!参数输入
t=0.016      !!板厚度板厚设为16mm
b=0.12       !!板宽度b=120mm
L1=0.15
L2=0.2
a=2*L1+L2       !!板长度L1=300mm
Ex=2.06e11  !!弹性模量
Nu=0.3      !!泊松比
r=0.015 !!圆半径
pres=1250000   !!荷载N/m拉力为 150kN

!!!!定义单元类型，实常数，材料特性
et,1,shell181
r,1,t
mp,ex,1,Ex
mp,prxy,1,Nu

!!!建立几何模型
k,1,-a/2,-b/2,0
k,2,a/2,-b/2,0
k,3,a/2,b/2,0
k,4,-a/2,b/2,0
k,5,L2/2,0,0
k,6,-L2/2,0,0
circle,5,r
circle,6,r
l,1,2
l,2,3
l,3,4
l,4,1
al,1,2,3,4
al,5,6,7,8
al,9,10,11,12
asba,3,1
asba,4,2
!!!单元划分
aatt,1,1,1,0
aesize,all,b/120  !!!设置单元划分尺寸
amesh,all

!!!给两加载边施加约束
DL,10, ,uz,0
DL,12, ,uz,0

!!!给两非加载边施加约束
DL,9, ,uz,0
DL,11, ,uz,0
dtran

!!施加x,y方向约束，消除刚体位移
nsel,s,loc,x,0,0
nsel,r,loc,y,b/2,b/2
d,all,ux,0
nsel,s,loc,x,0,0
nsel,r,loc,y,-b/2,-b/2
d,all,ux,0
nsel,s,loc,x,a/2,a/2
nsel,r,loc,y,0,0
d,all,uy,0
nsel,s,loc,x,-a/2,-a/2
nsel,r,loc,y,0,0
d,all,uy,0
nsel,all


!!!施加荷载
SFL,10,PRES,-pres
SFL,12,PRES,-pres
sftran

!!!首先进行静力解
/solu
antype,0
pstres,on
solve
finish

!!!然后进行屈曲分析
!/solu
!antype,1
!bucopt,lanb,4
!mxpand,4,,,1
!solve

!!!后处理
/post1
plnsol,s,x,0,1.0
